Team Air Plane

#mods since v1:
#	span: 3.848 -> 3.969
#	wing area : 1.49730 -> 1.732
#   larger ailerons now fully span outer sections

#Mach
 0.0
#IYsym   IZsym   Zsym
 0       0       0
#Sref    Cref    Bref
1.732    0.436   3.969
#Xref    Yref    Zref
0.06300  0.000   -0.036
#
#
#====================================================================
SURFACE
Wing
#Nchordwise  Cspace   Nspanwise   Sspace
15            1.0       12         1.0
#
YDUPLICATE
0.0
#
ANGLE
0.0
#-------------------------------------------------------------
SECTION
#Xle      Yle       Zle       Chord   Ainc  Nspanwise  Sspace
0.0000    0.0000    0.0000    0.494   4.7   19         3

AFIL
ag34.dat
#-------------------------------------------------------------
SECTION
#Xle    Yle    Zle     Chord   Ainc  Nspanwise  Sspace
0.0000  0.804  0.0803  0.447   3.5   19         3

AFIL
ag34.dat

#Cname   Cgain  Xhinge  HingeVec     SgnDup
CONTROL
aileron  -1.0   0.71    0.0 1.0 0.0  -1.0
#
#--------------------------------------------------
SECTION
#Xle    Yle    Zle     Chord   Ainc  Nspanwise  Sspace
0.0000  1.9125 0.201   0.379   3     19         3

AFIL
ag36.dat

#Cname   Cgain  Xhinge  HingeVec     SgnDup
CONTROL
aileron  -1.0   0.84    0.0 1.0 0.0  -1.0
#
#===================================================
#

SURFACE
STAB
#Nchordwise  Cspace  Nspanwise  Sspace
6            1.0     7          -2.0
YDUPLICATE
0.0
TRANSLATE
1.28  0.0  0.544
SECTION
#Xle    Yle    Zle     Chord   Ainc  Nspanwise  Sspace
0       0      0       0.222   0     7          -1.25
AFIL
ht14.dat
CONTROL
elevator  1.0  0.25  0. 0. 0.  1

SECTION
#Xle    Yle    Zle     Chord   Ainc  Nspanwise  Sspace
0       0.5    0.0     0.222   0     0          0
AFIL
ht14.dat
CONTROL
elevator  1.0  0.25  0. 1. 0.  1

#--------------------------------------------------

SURFACE
FIN
#Nchordwise  Cspace   Nspanewise  Sspace
5            1.0      10          1.0

TRANSLATE
1.28  0.0  0.0

SECTION
#Xle    Yle    Zle     Chord   Ainc  Nspanwise  Sspace
-0.078    0.     0.0     0.26     0.    7       -1.25

AFIL
ht14.dat

CONTROL
rudder  1.0  0.80  0. 0. 1.  1

SECTION
#Xle    Yle    Zle     Chord   Ainc  Nspanwise  Sspace
0       0      0.544   0.182   0     0          0
AFIL
ht14.dat
CONTROL
rudder  1.0  0.80  0. 0. 1.  1
